A := transpose([5, 0, 0, 1])
B := transpose([0, 0, 0, 1])
C := transpose([0, 5, 0, 1])
a := transpose([3, 0, 10, 1])
b := transpose([0, 0, 10, 1])
c := transpose([0, 3, 10, 1])
# задаем координаты камеры(в сферической системе координат)
r := 10
φvg := 340
φv := φvg*π/180 = 5.93412
θvg := 45
θv := θvg*π/180 = 0.785398
# матрица координат пирамиды
PIR := augment(A, B, C, a, b, c) = [5, 0, 0, 3, 0, 0; 0, 0, 5, 0, 0, 3; 0, 0, 0, 10, 10, 10; 1, 1, 1, 1, 1, 1]
xLW := 200
yLW := 100
xHW := 700
yHW := 500
# формируем матрицу пересчета координат из мировой системы координат в видовую
Kview := [
    -sin(φv), cos(φv), 0, 0;
    -cos(θv)*cos(φv), -cos(θv)*sin(φv), sin(θv), 0;
    -sin(θv)*cos(φv), -sin(θv)*sin(φv), -cos(θv), r;
    0, 0, 0, 1
] = [
    0.34202, 0.939693, 0, 0;
    -0.664463, 0.241845, 0.707107, 0;
    -0.664463, 0.241845, -0.707107, 10;
    0, 0, 0, 1
]
# вычисляем координаты вершин пирамиды в видовой системе координат
PIR_V := Kview*PIR = [
    1.7101, 0, 4.69846, 1.02606, 0, 2.81908;
    -3.32232, 0, 1.20922, 5.07768, 7.07107, 7.7966;
    6.67768, 10, 11.2092, 0.935543, 2.92893, 3.65447;
    1, 1, 1, 1, 1, 1
]
# Определяем координаты проекции вершин пирамиды на картинную плоскость
# (плоскость XvYv в видовой системе координат)
# вектор x - координат
XV := transpose(PIR_V)[:, 0] = [1.7101; 0; 4.69846; 1.02606; 0; 2.81908]
YV := transpose(PIR_V)[:, 1] = [-3.32232; 0; 1.20922; 5.07768; 7.07107; 7.7966]  # вектор у - координат
IV := transpose(PIR_V)[:, 3]  # вектор из единиц
# Формируем матрицу из координат проекций вершин пирамиды на картинную плоскость XvYv
Pxy := stack(transpose(XV), transpose(YV), transpose(IV))
# Опеределяем абаритную область проекции пирамиды на плоскость Xv Yv видовой СК
xL := min(XV) = 0
yH := max(YV) = 7.7966
xH := max(XV) = 4.69846
yL := min(YV) = -3.32232
# Параметры, необходимые для формирования матрицы пересчета из видовой СК в оконную СК
Δx := xH - xL = 4.69846
ΔxW := xHW - xLW = 500
Δy := yH - yL = 11.1189
ΔyW := yHW - yLW = 400
ky := ΔyW/Δy = 35.9747
kx := ΔxW/Δx = 106.418
MATRPERESRCH := [kx, 0, xLW - kx*xL; 0, -ky, yHW + ky*yL; 0, 0, 1] = [106.418, 0, 200; 0, -35.9747, 380.481; 0, 0, 1]
M1w := MATRPERESRCH*Pxy
Mw := vectorize(round(M1w))
# Оконные координаты вершин пирамиды
[xa, xb, xc, xd, xe, xf; ya, yb, yc, yd, ye, yf; q, q, q, q, q, q] := Mw
X := transpose([xa, xb, xc, xa, xd, xe, xb, xe, xf, xc, xf, xd])
Y := -transpose([ya, yb, yc, ya, yd, ye, yb, ye, yf, yc, yf, yd])
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