Dx := [-2; -2; -3; 0; 3; 2; 2; -2]
Dy := [-4; 0; 0; 4; 0; 0; -4; -4]
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xLw := 100
xHw := 400
xL := min(Dx)
xH := max(Dx)
yLw := 200
yHw := 500
yL := max(Dy)
yH := min(Dy)
Dx1 := (Dx - xL)*(xHw - xLw)/(xH - xL) + xLw
Dy1 := -(Dy - yL)*(yHw - yLw)/(yH - yL) + yLw
Dx1 = [150; 150; 100; 250; 400; 350; 350; 150]
Dy1 = [-100; 50; 50; 200; 50; 50; -100; -100]
Dw := [xLw; yLw; xHw; 2*yLw - yHw]
Dw1 := [xL; yH; xH; yL]
Dwx := [Dw[0]; Dw[2]; Dw[2]; Dw[0]; Dw[0]]
Dwy := [Dw[3]; Dw[3]; Dw[1]; Dw[1]; Dw[3]]
Dwx1 := [Dw1[0]; Dw1[2]; Dw1[2]; Dw1[0]; Dw1[0]]
Dwy1 := [Dw1[1]; Dw1[1]; Dw1[3]; Dw1[3]; Dw1[1]]
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xLw := 100
xHw := 800
yLw := 200
yHw := 900
f(x) := sin(π*x)*sqrt(|x|)
x_1 := -6
x_2 := 6
Δx := 0.1
N := round((x_2 - x_1)/Δx)
N = 120
i := 0 .. N
x[i] := x_1 + i*Δx
y[i] := f(x[i])
xH := max(x)
yL := min(y)
xL := min(x)
yH := max(y)
Dx1 := (x - xL)*(xHw - xLw)/(xH - xL) + xLw
Dy1 := -(y - yL)*(yHw - yLw)/(yH - yL) + yLw
Dw := [xLw; yLw; xHw; 2*yLw - yHw]
Dw1 := [xL; yH; xH; yL]
Dwx := [Dw[0]; Dw[2]; Dw[2]; Dw[0]; Dw[0]]
Dwy := [Dw[3]; Dw[3]; Dw[1]; Dw[1]; Dw[3]]
Dwx1 := [Dw1[0]; Dw1[2]; Dw1[2]; Dw1[0]; Dw1[0]]
Dwy1 := [Dw1[1]; Dw1[1]; Dw1[3]; Dw1[3]; Dw1[1]]
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